t := 0, 0.1 .. 20
f(t, β, α) := β*e^(-(β/t - α)^2/2)/(t^2*sqrt(2*π))
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F(t, β, α) := integral(f(t, β, α), t = 0 .. t)
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α1(α, β) := integral(t*f(t, β, α), t = 0 .. 20)
α2(α, β) := integral(t^2*f(t, β, α), t = 0 .. 20)
α3(α, β) := integral(t^3*f(t, β, α), t = 0 .. 20)
M1(α, β) := α1(α, β)
M1(3, 10) = 3.7909
M2(α, β) := β*(1 + 1/α^2)/α
M2(3, 10) = 3.7037
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a := 4
b := 20
moda(t, a, b) := root(d/dT(f(T, b, a)), T, 4, 20)
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moda(0, a, b) = 4.4949
root(F(t, b, a) - 1/2, t, 4, 20) = 5
D1(α, β) := α2(α, β) - (α1(α, β)^2)
D1(4, 20) = 2.86397
D2(α, β) := β^2*(1 + 8/α^2)/α^4
D2(4, 20) = 2.34375
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σ(α, β) := sqrt(D1(α, β))
σ(4, 20) = 1.69233
μ3(α, β) := 2*α1(α, β)^3 - 3*α1(α, β)*α2(α, β) + α3(α, β)
S(α, β) := μ3(α, β)/σ(α, β)^3
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