t := 0, 0.1 .. 20
f(t, α, β)
f(t, α, β) := β*e^(-(β/t - α)^2/2)/(t^2*sqrt(2*π))
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F(t, α, β) := integral(f(t, α, β), t = 0 .. t)
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α1(α, β) := integral(t*f(t, α, β), t = 0 .. 10)
α1(3, 10) = 3.57568
α1(3, 20) = 5.41591
α1(3, 30) = 4.04053
α1(4, 10) = 2.68347
α1(2, 10) = 4.16099
α2(α, β) := integral(t^2*f(t, α, β), t = 0 .. 10)
α2(3, 10) = 14.9444
α2(3, 20) = 36.8108
α2(3, 30) = 33.3308
α2(4, 10) = 7.91701
α2(2, 10) = 23.2823
α3(α, β) := integral(t^3*f(t, α, β), t = 0 .. 10)
α3(3, 10) = 72.3774
α3(3, 20) = 263.113
α3(3, 30) = 280.059
α3(4, 10) = 26.3825
α3(2, 10) = 145.759
M1(α, β) := α1(α, β)
M1(3, 10) = 3.57568
M1(3, 20) = 5.41591
M1(3, 30) = 4.04053
M1(4, 10) = 2.68347
M1(2, 10) = 4.16099
M2(α, β) := β*(1 + 1/α^2)/α
M2(3, 10) = 3.7037
M2(3, 20) = 7.40741
M2(3, 30) = 11.1111
M2(4, 10) = 2.65625
M2(2, 10) = 6.25
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a := 3
b := 10
moda(t, a, b) := root(d/dT(f(T, a, b)), T, 1, 20)
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moda(0, a, b) = 2.80776
moda(0, 4, b) = 2.24745
moda(0, a, 20) = 5.61553
moda(0, a, 30) = 8.42317
moda(0, 2, b) = 3.66025
root(F(t, a, b) - 1/2, t, 1, 20) = 3.33333
root(F(t, 4, b) - 1/2, t, 1, 20) = 2.5
root(F(t, a, 20) - 1/2, t, 1, 20) = 6.66667
root(F(t, 2, b) - 1/2, t, 1, 20) = 5
root(F(t, a, 30) - 1/2, t, 1, 20) = 10
D1(α, β) := α2(α, β) - (α1(α, β)^2)
D1(3, 10) = 2.15892
D1(3, 20) = 7.47874
D1(3, 30) = 17.0049
D1(3, 10) = 2.15892
D1(4, 10) = 0.715992
D1(2, 10) = 5.9685
D2(α, β) := β^2*(1 + 8/α^2)/α^4
D2(3, 20) = 9.32785
D2(3, 10) = 2.33196
D2(3, 30) = 20.9877
D2(3, 10) = 2.33196
D2(4, 10) = 0.585938
D2(2, 10) = 18.75
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σ(α, β) := sqrt(D1(α, β))
σ(3, 10) = 1.46933
σ(3, 20) = 2.73473
σ(3, 30) = 4.1237
σ(4, 10) = 0.846163
σ(2, 10) = 2.44305
μ3(α, β) := 2*α1(α, β)^3 - 3*α1(α, β)*α2(α, β) + α3(α, β)
S(α, β) := μ3(α, β)/σ(α, β)^3
S(3, 30) = 0.113612
S(4, 10) = 2.13716
S(a, b) = 1.10395
S(3, 20) = -0.843874
S(2, 10) = -0.054035
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