t := 0, 0.1 .. 20
f(t, α, β) := β*e^(-(β/t - α)^2/2)/(t^2*sqrt(2*π))
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F(t, α, β) := integral(f(t, α, β), t = 0 .. t)
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# Начальные моменты:
α1(α, β) := integral(t*f(t, α, β), t = 0 .. 10)
α1(5, 10) = 2.09201
α1(5, 20) = 4.16856
α1(6, 10) = 1.7175
α1(6, 20) = 3.43464
α2(α, β) := integral(t^2*f(t, α, β), t = 0 .. 10)
α2(5, 10) = 4.61695
α2(5, 20) = 18.2821
α2(6, 10) = 3.04998
α2(6, 20) = 12.1958
# Мат. ожидание:
M1(α, β) := α1(α, β)
M1(5, 10) = 2.09201
M1(5, 20) = 4.16856
M1(6, 10) = 1.7175
M1(6, 20) = 3.43464
# Дисперсия :
D1(α, β) := α2(α, β) - (α1(α, β)^2)
D1(5, 10) = 0.240449
D1(5, 20) = 0.905264
D1(6, 10) = 0.100184
D1(6, 20) = 0.399052
# СКО :
σ(α, β) := sqrt(D1(α, β))
σ(5, 10) = 0.490356
σ(5, 20) = 0.951454
σ(6, 10) = 0.316519
σ(6, 20) = 0.631706
n := 10000
i := 1 .. n
a := 0
b := 1
Y1 := runif(n, a, b)
G1(i, j) := root(F(t, 5, 10) - Y1[i], t, 0, 20)
G2(i, j) := root(F(t, 6, 10) - Y1[i], t, 0, 20)
G3(i, j) := root(F(t, 5, 20) - Y1[i], t, 0, 20)
G4(i, j) := root(F(t, 6, 20) - Y1[i], t, 0, 20)
X11 := matrix(n, 1, G1)
X12 := matrix(n, 1, G2)
X13 := matrix(n, 1, G3)
X14 := matrix(n, 1, G4)
X21 := sort(X11)
X22 := sort(X12)
X23 := sort(X13)
X24 := sort(X14)
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bin := 40
j := 1 .. bin + 1
lower1 := floor(min(X11))
lower2 := floor(min(X12))
lower3 := floor(min(X13))
lower4 := floor(min(X14))
upper1 := ceil(max(X11))
upper2 := ceil(max(X12))
upper3 := ceil(max(X13))
upper4 := ceil(max(X14))
h1 := (upper1 - lower1)/bin
h2 := (upper2 - lower2)/bin
h3 := (upper3 - lower3)/bin
h4 := (upper4 - lower4)/bin
int1[j] := lower1 + h1*j
int2[j] := lower2 + h2*j
int3[j] := lower3 + h3*j
int4[j] := lower4 + h4*j
t1 := hist(int1, X11)/(n*h1)
t2 := hist(int2, X12)/(n*h2)
t3 := hist(int3, X13)/(n*h3)
t4 := hist(int4, X14)/(n*h4)
int1 := int1 + h1/2
int2 := int2 + h2/2
int3 := int3 + h3/2
int4 := int4 + h4/2
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m4 := sum(X24[i], i = 0 .. n - 1)/n = 3.44884
m1 := sum(X21[i], i = 0 .. n - 1)/n = 2.10358
m2 := sum(X22[i], i = 0 .. n - 1)/n = 1.72443
m3 := sum(X23[i], i = 0 .. n - 1)/n = 4.20716
d4 := sum(X24[i]^2, i = 0 .. n - 1)/n - (sum(X24[i], i = 0 .. n - 1)/n)^2 = 0.422913
d1 := sum(X21[i]^2, i = 0 .. n - 1)/n - (sum(X21[i], i = 0 .. n - 1)/n)^2 = 0.256674
d2 := sum(X22[i]^2, i = 0 .. n - 1)/n - (sum(X22[i], i = 0 .. n - 1)/n)^2 = 0.105743
d3 := sum(X23[i]^2, i = 0 .. n - 1)/n - (sum(X23[i], i = 0 .. n - 1)/n)^2 = 1.02671
sigma4 := sqrt(d4) = 0.650318
sigma1 := sqrt(d1) = 0.50663
sigma2 := sqrt(d2) = 0.325182
sigma3 := sqrt(d3) = 1.01327
M1(5, 10) = 2.09201
m1 = 2.10358
D1(5, 10) = 0.240449
d1 = 0.256674
σ(5, 10) = 0.490356
sigma1 = 0.50663
M1(6, 10) = 1.7175
m2 = 1.72443
D1(6, 10) = 0.100184
d2 = 0.105743
σ(6, 10) = 0.316519
sigma2 = 0.325182
M1(5, 20) = 4.16856
m3 = 4.20716
D1(5, 20) = 0.905264
d3 = 1.02671
σ(5, 20) = 0.951454
sigma3 = 1.01327
M1(6, 20) = 3.43464
m4 = 3.44884
D1(6, 20) = 0.399052
d4 = 0.422913
σ(6, 20) = 0.631706
sigma4 = 0.650318
