t := 0, 0.1 .. 20
f(t, α, β) := β*e^(-(β/t - α)^2/2)/(t^2*sqrt(2*π))
F(t, α, β) := integral(f(t, α, β), t = 0 .. t)
N0 := 10000
i := 1 .. N0
a := 0
b := 1
Y1 := runif(N0, a, b)
X1(i, j) := root(F(t, 6, 10) - Y1[i], t, 0, 20)
X2(i, j) := root(F(t, 5, 10) - Y1[i], t, 0, 20)
X3(i, j) := root(F(t, 7, 15) - Y1[i], t, 0, 20)
X11 := matrix(N0, 1, X1)
X12 := matrix(N0, 1, X2)
X13 := matrix(N0, 1, X3)
X21 := sort(X11)
X22 := sort(X12)
X23 := sort(X13)
N(t) :=
    i ← 0
    while t > X21[i]
        i ← i + 1
    N0 - i
N2(t) :=
    i ← 0
    while t > X22[i]
        i ← i + 1
    N0 - i
N3(t) :=
    i ← 0
    while t > X23[i]
        i ← i + 1
    N0 - i
h := 0.5
Tmax := round(max(X21)/h, 0)
T2max := round(max(X22)/h, 0)
T3max := round(max(X23)/h, 0)
i := 0 .. Tmax
j := 0 .. T2max
k := 0 .. T3max
T[i] := i*h
T2[j] := j*h
T3[k] := k*h
i := 0 .. Tmax - 1
j := 0 .. T2max - 1
k := 0 .. T3max - 1
P1[i] := N(T[i])/N0
P2[j] := N2(T2[j])/N0
P3[k] := N3(T3[k])/N0
P1[Tmax] := 0
P2[T2max] := 0
P3[T3max] := 0
P(t, a, b) := 1 - F(t, a, b)
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Q1[i] := (N0 - N(T[i]))/N0
Q2[j] := (N0 - N2(T2[j]))/N0
Q3[k] := (N0 - N3(T3[k]))/N0
Q(t, a, b) := 1 - P(t, a, b)
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i := 0 .. Tmax - 2
j := 0 .. T2max - 2
k := 0 .. T3max - 2
f1[i] := (N(T[i]) - N(T[i] + h))/(N0*h)
f2[j] := (N2(T2[j]) - N2(T2[j] + h))/(N0*h)
f3[k] := (N3(T3[k]) - N3(T3[k] + h))/(N0*h)
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i := 0 .. Tmax - 2
j := 0 .. T2max - 2
k := 0 .. T3max - 2
λ(t, a, b) := f(t, a, b)/P(t, a, b)
λ1[i] := (N(T[i]) - N(T[i] + h))/(N(T[i])*h)
λ2[j] := (N2(T2[j]) - N2(T2[j] + h))/(N2(T2[j])*h)
λ3[k] := (N3(T3[k]) - N3(T3[k] + h))/(N3(T3[k])*h)
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