n := 18
ORIGIN := 1
i := 1 .. n
t := sort(rexp(n, 0.32))
t = [0.0361189; 0.609363; 1.0681; 1.58716; 1.67542; 1.9742; 2.48988; 3.27794; 3.72117; 5.1356; 5.46237; 5.60708; 5.98498; 6.64988; 7.47621; 8.94914; 14.7474; 20.8437]
Kjm := 0.031
E0 := 19
Given
sum(1/(E0 - (i - 1)) - Kjm*t[i], i = 1 .. n) == 0
sum(1/Kjm - (E0 - (i - 1))*t[i], i = 1 .. n) == 0
[Kjm; E0] := Minerr(Kjm, E0)
Kjm = 0.0348737
E0 = 18.0674
P[i] := e^(-Kjm*(E0 - (i - 1))*t[i])
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λ[i] := Kjm*(E0 - (i - 1))
λnext := Kjm*(E0 - n) = 0.00234971
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m[i] := 1/λ[i]
mnext := 1/λnext = 425.585
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